Fri Jan 16 15:17:03 UTC 2026
; PRO Tutorial Beta Regression ------------------------------------------------
$PROBLEM run7.mod
; Identifier: ID
; Dependent Variable: DV
; Time Variable: TAFD
; Subject Level: ID STDID SEX RACE MENOS ECOG DTH CHEMO SURGERY RADIO MHDEP
;   MDANX ERS PGRS AGE LESION1 HEIGHT WEIGHT DTHDY PFSDY
; Observation Level: C TAFD TAFR SCALE FLAG DV
; Dropped Variables: none

$INPUT C ID TAFD=TIME TAFR SCALE STDID SEX RACE MENOS ECOG DTH CHEMO SURGERY
  RADIO MHDEP MDANX ERS PGRS AGE LESION1 HEIGHT WEIGHT DTHDY PFSDY NQS FLAG DV

$DATA EQLQ_subscores_21OCT2025.csv
  IGNORE=C
  IGNORE=(SCALE.NE.2) ; Physical Functioning only
  IGNORE=(FLAG.NE.5) ; Absolute scores only

$ABBR FUNCTION BETA(VBT, 10) ; define VBT for calculating beta PDF

$PRED
; Fixed parameters
  DVLO = 1.0*NQS
  DVUP = 4.0*NQS

; Population parameters
  POPTBASE = (THETA(1)*NQS - DVLO)/(DVUP - DVLO) ; Baseline physical functioning score ([1,4] -> [0,1])
  POPLGTBASE = LOG(POPTBASE/(1 - POPTBASE)) ; Transformed baseline physical functioning score ([0,1] -> [-Inf,Inf])
  POPPMAX = THETA(2) ; Maximum placebo effect
  POPKPBO = THETA(3) ; Placebo rate constant
  POPPHI = THETA(4) ; Beta regression precision parameter
  POPZETA1 = THETA(5) ; Zero-/One-inflation intercept parameter
  POPZETA2 = THETA(6) ; Zero-/One-inflation slope parameter

; Individual parameters
  LGTBASE = POPLGTBASE + ETA(1)
  PMAX = POPPMAX + ETA(2)
  KPBO = POPKPBO
  PHI = POPPHI
  ZETA1 = POPZETA1
  ZETA2 = POPZETA2

; Time handling
  PTIME = TIME
  IF (TIME.LE.0) PTIME = 0

; Define model
; Latent variable has domain [-Inf,Inf]
  PEFF = PMAX*(1 - EXP(-KPBO*PTIME)); placebo effect
  LGTMU = LGTBASE - PEFF
  MU = 1/(1 + EXP(-LGTMU))

; Zero- and one-inflation
  LGTP0 = -ZETA1 - ZETA2*LGTMU
  LGTP1 = -ZETA1 + ZETA2*LGTMU
  P0 = 1E-6 + 1/(1 + EXP(-LGTP0))
  P1 = 1E-6 + 1/(1 + EXP(-LGTP1))

; Predictions (i.e. expectation)
  IPRED = (0*P0 + MU*(1 - P0 - P1) + 1*P1)*(DVUP - DVLO) + DVLO
  IF (COMACT.EQ.1) PPRED = IPRED

; Transform observed data
; Score has domain [1,4], needs to be [0,1] for beta regression
  TDV = (DV - DVLO)/(DVUP - DVLO)

; Beta distribution
  VBT(1) = TDV ; theta - observation
  VBT(2) = MU*PHI ; alpha - shape parameter
  VBT(3) = (1 - MU)*PHI ; beta - shape parameter
  BTLL = -BETA(VBT) + LOG(1 - P0 - P1)

; Log-Likelihood
  IF (DV.GT.DVLO.AND.DV.LT.DVUP) LL = BTLL
  IF (DV.EQ.DVLO) LL = LOG(P0)
  IF (DV.EQ.DVUP) LL = LOG(P1)
  Y = -2*LL

; Pearson weighted residuals
  PWRES = (TDV - MU)/(SQRT(MU*(1 - MU)/(1 + PHI)))

$THETA
  (1.00001, 1.7, 3.99999) ; TVBASE
  0.35 ; TVPMAX
  (0.00001, 0.006) ; TVKPBO
  (0.00001, 19) ; TVPHI
  9 ; TVZETA1
  (0.00001, 4) ; TVZETA2

$OMEGA
  0.8 ; PPVBASE
  1.2 ; PPVPMAX

;$SIGMA
;  1 FIX ; ERRDUM

;$SIM(555) ONLYSIM SUBPROB=1

$ESTIMATION METHOD=SAEM -2LL LAPLACIAN NUMERICAL SLOW AUTO=1 CTYPE=3 SEED=555
  CALPHA=0.01 SIGL=8 NOPRIOR=1 NOABORT
$ESTIMATION METHOD=IMP EONLY=1 AUTO=1 NITER=40 CTYPE=3
  PRINT=5 SIGL=8 NOPRIOR=1 FILE=run7.ext MSFO=run7.msf

;$ESTIMATION MAXEVAL=0 PRINT=1 METHOD=COND -2LL NUMERICAL LAPLACIAN NOABORT
;  SIG=3 SIGL=9 FILE=run7.ext MSFO=run7.msf

$COVARIANCE PRINT=E UNCONDITIONAL

$TABLE ID TIME TAFR DV PPRED IPRED PWRES SCALE FLAG BTLL MU P0 P1 LGTMU
  POPLGTBASE TDV
  NOPRINT NOAPPEND ONEHEADER IDFORMAT=I FILE=run7.fit

$TABLE ID ETAS(1:LAST) OBJI STDID SEX RACE MENOS ECOG DTH CHEMO SURGERY RADIO
  MHDEP MDANX ERS PGRS AGE LESION1 HEIGHT WEIGHT DTHDY PFSDY
  NOPRINT NOAPPEND FIRSTONLY ONEHEADER IDFORMAT=I FILE=run7.eta

; - - - - - - - - - - - - - - - - - - - - - - - - - - - - - - - - - - - - - - -

NM-TRAN MESSAGES
 WARNINGS AND ERRORS (IF ANY) FOR PROBLEM    1
 (WARNING  2) NM-TRAN INFERS THAT THE DATA ARE POPULATION.
 (WARNING  3) THERE MAY BE AN ERROR IN THE ABBREVIATED CODE. THE FOLLOWING
 ONE OR MORE RANDOM VARIABLES ARE DEFINED WITH "IF" STATEMENTS THAT DO NOT
 PROVIDE DEFINITIONS FOR BOTH THE "THEN" AND "ELSE" CASES. IF ALL
 CONDITIONS FAIL, THE VALUES OF THESE VARIABLES WILL BE ZERO.
   LL
 (WARNING  13) WITH USER-WRITTEN PRED OR $PRED, NM-TRAN CANNOT APPEND THE
 MDV DATA ITEM.
 (WARNING  115) THE FOLLOWING VARIABLES ARE NOT USED IN THE MU MODEL:
   MU
 (WARNING  83) FUNCTIONS ARE USED IN ABBREVIATED CODE, BUT THE $SUBROUTINES
 RECORD DOES NOT INCLUDE THE "OTHER" OPTION.

1NONLINEAR MIXED EFFECTS MODEL PROGRAM (NONMEM) VERSION 7.5.0
 ORIGINALLY DEVELOPED BY STUART BEAL, LEWIS SHEINER, AND ALISON BOECKMANN
 CURRENT DEVELOPERS ARE ROBERT BAUER, ICON DEVELOPMENT SOLUTIONS,
 AND ALISON BOECKMANN. IMPLEMENTATION, EFFICIENCY, AND STANDARDIZATION
 PERFORMED BY NOUS INFOSYSTEMS.
 PROBLEM NO.:         1
 run7.mod
 TOT. NO. OF OBS RECS:     1267
 TOT. NO. OF INDIVIDUALS:      199
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 #TBLN:      1
 #METH: Stochastic Approximation Expectation-Maximization (No Prior)
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
 #TERM:
 STOCHASTIC PORTION WAS COMPLETED
 REDUCED STOCHASTIC PORTION WAS COMPLETED

 ETABAR IS THE ARITHMETIC MEAN OF THE ETA-ESTIMATES,
 AND THE P-VALUE IS GIVEN FOR THE NULL HYPOTHESIS THAT THE TRUE MEAN IS 0.

 ETABAR:         4.8708E-03  4.7729E-03
 SE:             5.9392E-02  5.4284E-02
 N:                     199         199

 P VAL.:         9.3464E-01  9.2994E-01

 ETASHRINKSD(%)  6.5204E+00  3.1651E+01
 ETASHRINKVR(%)  1.2616E+01  5.3284E+01
 EBVSHRINKSD(%)  6.5196E+00  3.1655E+01
 EBVSHRINKVR(%)  1.2614E+01  5.3289E+01
 RELATIVEINF(%)  8.3392E+01  4.4576E+01
 EPSSHRINKSD(%)  1.0000E+02
 EPSSHRINKVR(%)  1.0000E+02


 TOTAL DATA POINTS NORMALLY DISTRIBUTED (N):            0
 N*LOG(2PI) CONSTANT TO OBJECTIVE FUNCTION:    0.0000000000000000
 OBJECTIVE FUNCTION VALUE WITHOUT CONSTANT:   -1192.2425655178949
 OBJECTIVE FUNCTION VALUE WITH CONSTANT:      -1192.2425655178949
 REPORTED OBJECTIVE FUNCTION DOES NOT CONTAIN CONSTANT

 TOTAL EFFECTIVE ETAS (NIND*NETA):                           398
 NIND*NETA*LOG(2PI) CONSTANT TO OBJECTIVE FUNCTION:    731.47507243091945
 OBJECTIVE FUNCTION VALUE WITHOUT CONSTANT:   -1192.2425655178949
 OBJECTIVE FUNCTION VALUE WITH CONSTANT:      -460.76749308697549
 REPORTED OBJECTIVE FUNCTION DOES NOT CONTAIN CONSTANT


 #TERE:
 Elapsed estimation  time in seconds:    86.46
 Elapsed covariance  time in seconds:     0.01

 ********************           STOCHASTIC APPROXIMATION EXPECTATION-MAXIMIZATION (NO PRIOR)         ********************
 #OBJT:**************                        FINAL VALUE OF LIKELIHOOD FUNCTION                      ********************
 #OBJV:********************************************    -1192.243       **************************************************

 ********************           STOCHASTIC APPROXIMATION EXPECTATION-MAXIMIZATION (NO PRIOR)         ********************
 ********************                             FINAL PARAMETER ESTIMATE                           ********************

 THETA - VECTOR OF FIXED EFFECTS PARAMETERS   *********
         TH 1      TH 2      TH 3      TH 4      TH 5      TH 6
         1.66E+00 -7.65E-02  6.64E-03  1.69E+01  9.19E+00  4.05E+00

 OMEGA - COV MATRIX FOR RANDOM EFFECTS - ETAS  ********
         ETA1      ETA2
 ETA1
+        8.07E-01
 ETA2
+        0.00E+00  1.26E+00

 OMEGA - CORR MATRIX FOR RANDOM EFFECTS - ETAS  *******
         ETA1      ETA2
 ETA1
+        8.99E-01
 ETA2
+        0.00E+00  1.12E+00

 ********************           STOCHASTIC APPROXIMATION EXPECTATION-MAXIMIZATION (NO PRIOR)         ********************
 ********************                          STANDARD ERROR OF ESTIMATE (S)                        ********************

 THETA - VECTOR OF FIXED EFFECTS PARAMETERS   *********
         TH 1      TH 2      TH 3      TH 4      TH 5      TH 6
         4.20E-02  1.25E-01  1.53E-03  4.88E-01  7.28E-01  4.19E-01

 OMEGA - COV MATRIX FOR RANDOM EFFECTS - ETAS  ********
         ETA1      ETA2
 ETA1
+        1.05E-01
 ETA2
+        0.00E+00  4.65E-01

 OMEGA - CORR MATRIX FOR RANDOM EFFECTS - ETAS  *******
         ETA1      ETA2
 ETA1
+        5.84E-02
 ETA2
+       .........  2.07E-01

 ********************           STOCHASTIC APPROXIMATION EXPECTATION-MAXIMIZATION (NO PRIOR)         ********************
 ********************                        COVARIANCE MATRIX OF ESTIMATE (S)                       ********************

            TH 1      TH 2      TH 3      TH 4      TH 5      TH 6      OM11      OM12      OM22
 TH 1
+        1.76E-03
 TH 2
+        3.79E-04  1.57E-02
 TH 3
+       -7.04E-06  2.27E-05  2.36E-06
 TH 4
+        3.48E-03 -1.04E-02 -3.04E-04  2.38E-01
 TH 5
+        1.10E-02 -3.30E-03 -2.73E-04  8.46E-02  5.30E-01
 TH 6
+        7.60E-03  8.30E-04 -1.37E-04  4.70E-02  2.95E-01  1.75E-01
 OM11
+       -1.48E-03 -2.74E-03  1.70E-05 -4.25E-03 -2.25E-02 -1.72E-02  1.10E-02
 OM12
+       ......... ......... ......... ......... ......... ......... ......... .........
 OM22
+        1.77E-03 -1.45E-03 -6.44E-04  1.07E-01  1.06E-01  5.42E-02 -9.20E-03  0.00E+00  2.16E-01

 ********************           STOCHASTIC APPROXIMATION EXPECTATION-MAXIMIZATION (NO PRIOR)         ********************
 ********************                        CORRELATION MATRIX OF ESTIMATE (S)                      ********************

            TH 1      TH 2      TH 3      TH 4      TH 5      TH 6      OM11      OM12      OM22
 TH 1
+        4.20E-02
 TH 2
+        7.20E-02  1.25E-01
 TH 3
+       -1.09E-01  1.18E-01  1.53E-03
 TH 4
+        1.70E-01 -1.70E-01 -4.06E-01  4.88E-01
 TH 5
+        3.58E-01 -3.61E-02 -2.45E-01  2.38E-01  7.28E-01
 TH 6
+        4.32E-01  1.58E-02 -2.13E-01  2.30E-01  9.69E-01  4.19E-01
 OM11
+       -3.37E-01 -2.08E-01  1.06E-01 -8.31E-02 -2.94E-01 -3.92E-01  1.05E-01
 OM12
+       ......... ......... ......... ......... ......... ......... ......... .........
 OM22
+        9.07E-02 -2.49E-02 -9.02E-01  4.72E-01  3.12E-01  2.78E-01 -1.89E-01  0.00E+00  4.65E-01
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
 ********************           STOCHASTIC APPROXIMATION EXPECTATION-MAXIMIZATION (NO PRIOR)         ********************
 ********************                    EIGENVALUES OF COR MATRIX OF ESTIMATE (S)                   ********************

             1         2         3         4         5         6         7         8
         2.23E-02  8.21E-02  6.02E-01  6.45E-01  7.91E-01  1.11E+00  1.72E+00  3.03E+00
 #TBLN:      2
 #METH: Objective Function Evaluation by Importance Sampling (No Prior)
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
 #TERM:
 EXPECTATION ONLY PROCESS WAS COMPLETED

 ETABAR IS THE ARITHMETIC MEAN OF THE ETA-ESTIMATES,
 AND THE P-VALUE IS GIVEN FOR THE NULL HYPOTHESIS THAT THE TRUE MEAN IS 0.

 ETABAR:         4.9651E-03  5.3767E-03
 SE:             5.9323E-02  5.4871E-02
 N:                     199         199

 P VAL.:         9.3330E-01  9.2194E-01

 ETASHRINKSD(%)  6.6289E+00  3.0912E+01
 ETASHRINKVR(%)  1.2818E+01  5.2269E+01
 EBVSHRINKSD(%)  6.5624E+00  3.1547E+01
 EBVSHRINKVR(%)  1.2694E+01  5.3142E+01
 RELATIVEINF(%)  8.3321E+01  4.4719E+01
 EPSSHRINKSD(%)  1.0000E+02
 EPSSHRINKVR(%)  1.0000E+02


 TOTAL DATA POINTS NORMALLY DISTRIBUTED (N):            0
 N*LOG(2PI) CONSTANT TO OBJECTIVE FUNCTION:    0.0000000000000000
 OBJECTIVE FUNCTION VALUE WITHOUT CONSTANT:   -756.88345331385278
 OBJECTIVE FUNCTION VALUE WITH CONSTANT:      -756.88345331385278
 REPORTED OBJECTIVE FUNCTION DOES NOT CONTAIN CONSTANT

 TOTAL EFFECTIVE ETAS (NIND*NETA):                           398


 #TERE:
 Elapsed estimation  time in seconds:     3.76
 Elapsed covariance  time in seconds:    32.97

 ********************         OBJECTIVE FUNCTION EVALUATION BY IMPORTANCE SAMPLING (NO PRIOR)        ********************
 #OBJT:**************                        FINAL VALUE OF OBJECTIVE FUNCTION                       ********************
 #OBJV:********************************************     -756.883       **************************************************

 ********************         OBJECTIVE FUNCTION EVALUATION BY IMPORTANCE SAMPLING (NO PRIOR)        ********************
 ********************                             FINAL PARAMETER ESTIMATE                           ********************

 THETA - VECTOR OF FIXED EFFECTS PARAMETERS   *********
         TH 1      TH 2      TH 3      TH 4      TH 5      TH 6
         1.66E+00 -7.65E-02  6.64E-03  1.69E+01  9.19E+00  4.05E+00

 OMEGA - COV MATRIX FOR RANDOM EFFECTS - ETAS  ********
         ETA1      ETA2
 ETA1
+        8.07E-01
 ETA2
+        0.00E+00  1.26E+00

 OMEGA - CORR MATRIX FOR RANDOM EFFECTS - ETAS  *******
         ETA1      ETA2
 ETA1
+        8.99E-01
 ETA2
+        0.00E+00  1.12E+00

 ********************         OBJECTIVE FUNCTION EVALUATION BY IMPORTANCE SAMPLING (NO PRIOR)        ********************
 ********************                         STANDARD ERROR OF ESTIMATE (RSR)                       ********************

 THETA - VECTOR OF FIXED EFFECTS PARAMETERS   *********
         TH 1      TH 2      TH 3      TH 4      TH 5      TH 6
         9.28E-02  3.27E-01  1.26E-02  1.91E+00  1.18E+00  6.05E-01

 OMEGA - COV MATRIX FOR RANDOM EFFECTS - ETAS  ********
         ETA1      ETA2
 ETA1
+        1.29E-01
 ETA2
+        0.00E+00  2.66E+00

 OMEGA - CORR MATRIX FOR RANDOM EFFECTS - ETAS  *******
         ETA1      ETA2
 ETA1
+        7.17E-02
 ETA2
+       .........  1.19E+00

 ********************         OBJECTIVE FUNCTION EVALUATION BY IMPORTANCE SAMPLING (NO PRIOR)        ********************
 ********************                       COVARIANCE MATRIX OF ESTIMATE (RSR)                      ********************

            TH 1      TH 2      TH 3      TH 4      TH 5      TH 6      OM11      OM12      OM22
 TH 1
+        8.61E-03
 TH 2
+       -2.45E-02  1.07E-01
 TH 3
+       -1.08E-03  3.76E-03  1.58E-04
 TH 4
+       -6.48E-02  2.09E-01  8.68E-03  3.64E+00
 TH 5
+       -2.63E-02  6.50E-02  3.06E-03 -4.39E-01  1.39E+00
 TH 6
+       -1.21E-02  2.88E-02  1.35E-03 -3.53E-01  6.99E-01  3.66E-01
 OM11
+        1.16E-03 -3.24E-03 -1.33E-04  7.48E-02 -3.56E-02 -2.45E-02  1.66E-02
 OM12
+       ......... ......... ......... ......... ......... ......... ......... .........
 OM22
+        2.25E-01 -8.07E-01 -3.28E-02 -1.51E+00 -8.64E-01 -4.31E-01  6.54E-02  0.00E+00  7.10E+00

 ********************         OBJECTIVE FUNCTION EVALUATION BY IMPORTANCE SAMPLING (NO PRIOR)        ********************
 ********************                       CORRELATION MATRIX OF ESTIMATE (RSR)                     ********************

            TH 1      TH 2      TH 3      TH 4      TH 5      TH 6      OM11      OM12      OM22
 TH 1
+        9.28E-02
 TH 2
+       -8.08E-01  3.27E-01
 TH 3
+       -9.28E-01  9.15E-01  1.26E-02
 TH 4
+       -3.66E-01  3.35E-01  3.62E-01  1.91E+00
 TH 5
+       -2.40E-01  1.68E-01  2.06E-01 -1.95E-01  1.18E+00
 TH 6
+       -2.15E-01  1.46E-01  1.77E-01 -3.06E-01  9.79E-01  6.05E-01
 OM11
+        9.71E-02 -7.69E-02 -8.20E-02  3.04E-01 -2.34E-01 -3.14E-01  1.29E-01
 OM12
+       ......... ......... ......... ......... ......... ......... ......... .........
 OM22
+        9.10E-01 -9.26E-01 -9.78E-01 -2.96E-01 -2.75E-01 -2.67E-01  1.90E-01  0.00E+00  2.66E+00
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
 ********************         OBJECTIVE FUNCTION EVALUATION BY IMPORTANCE SAMPLING (NO PRIOR)        ********************
 ********************                   EIGENVALUES OF COR MATRIX OF ESTIMATE (RSR)                  ********************

             1         2         3         4         5         6         7         8
         6.45E-03  1.89E-02  4.92E-02  1.87E-01  5.43E-01  9.45E-01  2.21E+00  4.04E+00
 Elapsed postprocess time in seconds:     0.03
 Elapsed finaloutput time in seconds:     0.05
 #CPUT: Total CPU Time in Seconds,      122.782
