Fri Jan 16 13:39:05 UTC 2026
; PRO Tutorial Beta Regression ------------------------------------------------
$PROBLEM run9.mod
; Identifier: ID
; Dependent Variable: DV
; Time Variable: TAFD
; Subject Level: ID STDID SEX RACE MENOS ECOG DTH CHEMO SURGERY RADIO MHDEP
;   MDANX ERS PGRS AGE LESION1 HEIGHT WEIGHT DTHDY PFSDY
; Observation Level: C TAFD TAFR SCALE FLAG DV
; Dropped Variables: none

$INPUT C ID TAFD=TIME TAFR SCALE STDID SEX RACE MENOS ECOG DTH CHEMO SURGERY
  RADIO MHDEP MDANX ERS PGRS AGE LESION1 HEIGHT WEIGHT DTHDY PFSDY NQS FLAG DV

$DATA EQLQ_subscores_21OCT2025.csv
  IGNORE=C
  IGNORE=(SCALE.NE.2) ; Physical Functioning only
  IGNORE=(FLAG.NE.5) ; Absolute scores only

$ABBR FUNCTION BETACDF(VBL, 10) ; define function BETACDF and vector VBL
$ABBR VECTOR VBU(10) ; define vector VBU

$PRED
; Fixed parameters
  DVLO = 1.0*NQS
  DVUP = 4.0*NQS

; Population parameters
  POPTBASE = (THETA(1)*NQS - DVLO)/(DVUP - DVLO) ; Baseline physical functioning score ([1,4] -> [0,3])
  POPLGTBASE = LOG(POPTBASE/(1 - POPTBASE)) ; Transformed baseline physical functioning score ([0,3] -> [0,1])
  POPPMAX = THETA(2) ; Maximum placebo effect
  POPKPBO = THETA(3) ; Placebo rate constant
  POPKDIS = THETA(4) ; Disease progression rate constant
  POPPHI = THETA(5) ; Beta regression precision parameter

; Individual parameters
  LGTBASE = POPLGTBASE + ETA(1)
  PMAX = POPPMAX + ETA(2)
  KPBO = POPKPBO
  KDIS = POPKDIS*EXP(ETA(3))
  PHI = POPPHI

; Time handling
  PTIME = TIME
  IF (TIME.LE.0) PTIME = 0

; Define model
; Latent variable has domain [-Inf,Inf]
  PEFF = PMAX*(1 - EXP(-KPBO*PTIME)); placebo effect
  DPRO = EXP(KDIS*TIME) - 1 ; disease progression
  LGTMU = LGTBASE - PEFF + DPRO
  MU = 1/(1 + EXP(-LGTMU))
  IF (COMACT.EQ.1) PMU = MU ; population prediction

; Transform observed data
; Score has domain [1,4], needs to be [0,1] for beta regression
  TDVL = (DV - DVLO)/(DVUP - DVLO + 1)
  TDVU = (DV - DVLO + 1)/(DVUP - DVLO + 1)

; Lower beta cumulative distribution
  VBL(1) = TDVL ; theta - observation
  VBL(2) = MU*PHI ; alpha - shape parameter
  VBL(3) = (1 - MU)*PHI ; beta - shape parameter

; Upper beta cumulative distribution
  VBU(1) = TDVU ; theta - observation
  VBU(2) = MU*PHI ; alpha - shape parameter
  VBU(3) = (1 - MU)*PHI ; beta - shape parameter

; Log-Likelihood
  DUM = 1.0E-30 ; placeholder
  BTL = BETACDF(VBU) - BETACDF(VBL)
  Y = DUM
  IF (BTL.GE.DUM) Y = BTL

$THETA
  (1.00001, 1.7, 3.99999) ; TVBASE
  0.35 ; TVPMAX
  (0.00001, 0.006) ; TVKPBO
  (0.00001, 0.0004) ; TVKDIS
  (0.00001, 19) ; TVPHI

$OMEGA
  0.8 ; PPVBASE
  1.2 ; PPVPMAX
  3.6 ; PPVKDIS

;$SIGMA
;  1 FIX ; ERRDUM

;$SIM(555) ONLYSIM SUBPROB=1

$ESTIMATION METHOD=SAEM LIKELIHOOD LAPLACIAN NUMERICAL SLOW AUTO=1 CTYPE=3 SEED=555
  CALPHA=0.01 SIGL=8 NOPRIOR=1 NOABORT
$ESTIMATION METHOD=IMP EONLY=1 AUTO=1 NITER=40 CTYPE=3
  PRINT=5 SIGL=8 NOPRIOR=1 FILE=run9.ext MSFO=run9.msf

;$ESTIMATION MAXEVAL=0 PRINT=1 METHOD=COND -2LL NUMERICAL LAPLACIAN NOABORT
;  SIG=3 SIGL=9 FILE=run9.ext MSFO=run9.msf

$COVARIANCE PRINT=E UNCONDITIONAL

$TABLE ID TIME TAFR DV SCALE FLAG MU PMU PHI DVLO DVUP
  NOPRINT NOAPPEND ONEHEADER IDFORMAT=I FILE=run9.fit

$TABLE ID ETAS(1:LAST) OBJI STDID SEX RACE MENOS ECOG DTH CHEMO SURGERY RADIO
  MHDEP MDANX ERS PGRS AGE LESION1 HEIGHT WEIGHT DTHDY PFSDY
  NOPRINT NOAPPEND FIRSTONLY ONEHEADER IDFORMAT=I FILE=run9.eta

; - - - - - - - - - - - - - - - - - - - - - - - - - - - - - - - - - - - - - - -

NM-TRAN MESSAGES
 WARNINGS AND ERRORS (IF ANY) FOR PROBLEM    1
 (WARNING  2) NM-TRAN INFERS THAT THE DATA ARE POPULATION.
 (WARNING  13) WITH USER-WRITTEN PRED OR $PRED, NM-TRAN CANNOT APPEND THE
 MDV DATA ITEM.
 (WARNING  115) THE FOLLOWING VARIABLES ARE NOT USED IN THE MU MODEL:
   MU
 (WARNING  83) FUNCTIONS ARE USED IN ABBREVIATED CODE, BUT THE $SUBROUTINES
 RECORD DOES NOT INCLUDE THE "OTHER" OPTION.

1NONLINEAR MIXED EFFECTS MODEL PROGRAM (NONMEM) VERSION 7.5.0
 ORIGINALLY DEVELOPED BY STUART BEAL, LEWIS SHEINER, AND ALISON BOECKMANN
 CURRENT DEVELOPERS ARE ROBERT BAUER, ICON DEVELOPMENT SOLUTIONS,
 AND ALISON BOECKMANN. IMPLEMENTATION, EFFICIENCY, AND STANDARDIZATION
 PERFORMED BY NOUS INFOSYSTEMS.
 PROBLEM NO.:         1
 run9.mod
 TOT. NO. OF OBS RECS:     1267
 TOT. NO. OF INDIVIDUALS:      199
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 #TBLN:      1
 #METH: Stochastic Approximation Expectation-Maximization (No Prior)
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
 #TERM:
 STOCHASTIC PORTION WAS COMPLETED
 REDUCED STOCHASTIC PORTION WAS COMPLETED

 ETABAR IS THE ARITHMETIC MEAN OF THE ETA-ESTIMATES,
 AND THE P-VALUE IS GIVEN FOR THE NULL HYPOTHESIS THAT THE TRUE MEAN IS 0.

 ETABAR:        -1.4367E-02  7.1148E-03 -8.4660E-03
 SE:             6.4594E-02  4.4309E-02  5.9796E-02
 N:                     199         199         199

 P VAL.:         8.2399E-01  8.7243E-01  8.8741E-01

 ETASHRINKSD(%)  7.1163E+00  3.8892E+01  5.4468E+01
 ETASHRINKVR(%)  1.3726E+01  6.2658E+01  7.9268E+01
 EBVSHRINKSD(%)  7.1030E+00  3.8896E+01  5.4461E+01
 EBVSHRINKVR(%)  1.3701E+01  6.2663E+01  7.9262E+01
 RELATIVEINF(%)  8.1940E+01  3.0296E+01  1.7621E+01
 EPSSHRINKSD(%)  1.0000E+02
 EPSSHRINKVR(%)  1.0000E+02


 TOTAL DATA POINTS NORMALLY DISTRIBUTED (N):            0
 N*LOG(2PI) CONSTANT TO OBJECTIVE FUNCTION:    0.0000000000000000
 OBJECTIVE FUNCTION VALUE WITHOUT CONSTANT:    4641.6273313574247
 OBJECTIVE FUNCTION VALUE WITH CONSTANT:       4641.6273313574247
 REPORTED OBJECTIVE FUNCTION DOES NOT CONTAIN CONSTANT

 TOTAL EFFECTIVE ETAS (NIND*NETA):                           597
 NIND*NETA*LOG(2PI) CONSTANT TO OBJECTIVE FUNCTION:    1097.2126086463791
 OBJECTIVE FUNCTION VALUE WITHOUT CONSTANT:    4641.6273313574247
 OBJECTIVE FUNCTION VALUE WITH CONSTANT:       5738.8399400038033
 REPORTED OBJECTIVE FUNCTION DOES NOT CONTAIN CONSTANT


 #TERE:
 Elapsed estimation  time in seconds:   377.97
 Elapsed covariance  time in seconds:     0.02

 ********************           STOCHASTIC APPROXIMATION EXPECTATION-MAXIMIZATION (NO PRIOR)         ********************
 #OBJT:**************                        FINAL VALUE OF LIKELIHOOD FUNCTION                      ********************
 #OBJV:********************************************     4641.627       **************************************************

 ********************           STOCHASTIC APPROXIMATION EXPECTATION-MAXIMIZATION (NO PRIOR)         ********************
 ********************                             FINAL PARAMETER ESTIMATE                           ********************

 THETA - VECTOR OF FIXED EFFECTS PARAMETERS   *********
         TH 1      TH 2      TH 3      TH 4      TH 5
         1.67E+00  3.80E-01  7.59E-03  3.42E-04  2.01E+01

 OMEGA - COV MATRIX FOR RANDOM EFFECTS - ETAS  ********
         ETA1      ETA2      ETA3
 ETA1
+        9.67E-01
 ETA2
+        0.00E+00  1.05E+00
 ETA3
+        0.00E+00  0.00E+00  3.45E+00

 OMEGA - CORR MATRIX FOR RANDOM EFFECTS - ETAS  *******
         ETA1      ETA2      ETA3
 ETA1
+        9.83E-01
 ETA2
+        0.00E+00  1.03E+00
 ETA3
+        0.00E+00  0.00E+00  1.86E+00

 ********************           STOCHASTIC APPROXIMATION EXPECTATION-MAXIMIZATION (NO PRIOR)         ********************
 ********************                          STANDARD ERROR OF ESTIMATE (S)                        ********************

 THETA - VECTOR OF FIXED EFFECTS PARAMETERS   *********
         TH 1      TH 2      TH 3      TH 4      TH 5
         4.01E-02  1.65E-01  2.18E-03  3.06E-04  6.38E-01

 OMEGA - COV MATRIX FOR RANDOM EFFECTS - ETAS  ********
         ETA1      ETA2      ETA3
 ETA1
+        1.15E-01
 ETA2
+        0.00E+00  4.25E-01
 ETA3
+        0.00E+00  0.00E+00  1.79E+00

 OMEGA - CORR MATRIX FOR RANDOM EFFECTS - ETAS  *******
         ETA1      ETA2      ETA3
 ETA1
+        5.84E-02
 ETA2
+       .........  2.07E-01
 ETA3
+       ......... .........  4.81E-01

 ********************           STOCHASTIC APPROXIMATION EXPECTATION-MAXIMIZATION (NO PRIOR)         ********************
 ********************                        COVARIANCE MATRIX OF ESTIMATE (S)                       ********************

            TH 1      TH 2      TH 3      TH 4      TH 5      OM11      OM12      OM13      OM22      OM23      OM33
 TH 1
+        1.61E-03
 TH 2
+        6.35E-04  2.72E-02
 TH 3
+        1.06E-05 -1.19E-04  4.74E-06
 TH 4
+        1.44E-06  2.94E-05 -4.47E-08  9.39E-08
 TH 5
+       -9.81E-04  4.12E-03 -4.98E-04 -5.92E-06  4.07E-01
 OM11
+        4.59E-04 -3.31E-03  2.31E-05  1.14E-06  8.23E-04  1.32E-02
 OM12
+       ......... ......... ......... ......... ......... ......... .........
 OM13
+       ......... ......... ......... ......... ......... ......... ......... .........
 OM22
+       -2.74E-03  1.17E-02 -7.72E-04 -1.26E-05  1.20E-01 -9.47E-03  0.00E+00  0.00E+00  1.81E-01
 OM23
+       ......... ......... ......... ......... ......... ......... ......... ......... ......... .........
 OM33
+       -8.39E-03 -1.42E-01  1.35E-04 -5.07E-04  7.57E-02 -3.23E-03  0.00E+00  0.00E+00  6.15E-02  0.00E+00  3.19E+00

 ********************           STOCHASTIC APPROXIMATION EXPECTATION-MAXIMIZATION (NO PRIOR)         ********************
 ********************                        CORRELATION MATRIX OF ESTIMATE (S)                      ********************

            TH 1      TH 2      TH 3      TH 4      TH 5      OM11      OM12      OM13      OM22      OM23      OM33
 TH 1
+        4.01E-02
 TH 2
+        9.59E-02  1.65E-01
 TH 3
+        1.21E-01 -3.32E-01  2.18E-03
 TH 4
+        1.17E-01  5.81E-01 -6.70E-02  3.06E-04
 TH 5
+       -3.83E-02  3.91E-02 -3.58E-01 -3.03E-02  6.38E-01
 OM11
+        9.94E-02 -1.74E-01  9.25E-02  3.25E-02  1.12E-02  1.15E-01
 OM12
+       ......... ......... ......... ......... ......... ......... .........
 OM13
+       ......... ......... ......... ......... ......... ......... ......... .........
 OM22
+       -1.61E-01  1.66E-01 -8.34E-01 -9.69E-02  4.42E-01 -1.94E-01  0.00E+00  0.00E+00  4.25E-01
 OM23
+       ......... ......... ......... ......... ......... ......... ......... ......... ......... .........
 OM33
+       -1.17E-01 -4.81E-01  3.47E-02 -9.26E-01  6.64E-02 -1.57E-02  0.00E+00  0.00E+00  8.09E-02  0.00E+00  1.79E+00
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
 ********************           STOCHASTIC APPROXIMATION EXPECTATION-MAXIMIZATION (NO PRIOR)         ********************
 ********************                    EIGENVALUES OF COR MATRIX OF ESTIMATE (S)                   ********************

             1         2         3         4         5         6         7         8
         5.98E-02  1.36E-01  4.70E-01  6.92E-01  9.12E-01  1.08E+00  2.22E+00  2.43E+00
 #TBLN:      2
 #METH: Objective Function Evaluation by Importance Sampling (No Prior)
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
 #TERM:
 EXPECTATION ONLY PROCESS WAS COMPLETED

 ETABAR IS THE ARITHMETIC MEAN OF THE ETA-ESTIMATES,
 AND THE P-VALUE IS GIVEN FOR THE NULL HYPOTHESIS THAT THE TRUE MEAN IS 0.

 ETABAR:        -1.5189E-02  8.3881E-03  5.2149E-03
 SE:             6.4672E-02  4.4702E-02  6.3628E-02
 N:                     199         199         199

 P VAL.:         8.1431E-01  8.5115E-01  9.3468E-01

 ETASHRINKSD(%)  7.0029E+00  3.8350E+01  5.1550E+01
 ETASHRINKVR(%)  1.3515E+01  6.1992E+01  7.6526E+01
 EBVSHRINKSD(%)  7.1396E+00  3.8727E+01  5.4020E+01
 EBVSHRINKVR(%)  1.3769E+01  6.2456E+01  7.8858E+01
 RELATIVEINF(%)  8.1652E+01  3.0842E+01  1.8254E+01
 EPSSHRINKSD(%)  1.0000E+02
 EPSSHRINKVR(%)  1.0000E+02


 TOTAL DATA POINTS NORMALLY DISTRIBUTED (N):            0
 N*LOG(2PI) CONSTANT TO OBJECTIVE FUNCTION:    0.0000000000000000
 OBJECTIVE FUNCTION VALUE WITHOUT CONSTANT:    4755.3383926323795
 OBJECTIVE FUNCTION VALUE WITH CONSTANT:       4755.3383926323795
 REPORTED OBJECTIVE FUNCTION DOES NOT CONTAIN CONSTANT

 TOTAL EFFECTIVE ETAS (NIND*NETA):                           597


 #TERE:
 Elapsed estimation  time in seconds:    12.99
 Elapsed covariance  time in seconds:    79.84

 ********************         OBJECTIVE FUNCTION EVALUATION BY IMPORTANCE SAMPLING (NO PRIOR)        ********************
 #OBJT:**************                        FINAL VALUE OF OBJECTIVE FUNCTION                       ********************
 #OBJV:********************************************     4755.338       **************************************************

 ********************         OBJECTIVE FUNCTION EVALUATION BY IMPORTANCE SAMPLING (NO PRIOR)        ********************
 ********************                             FINAL PARAMETER ESTIMATE                           ********************

 THETA - VECTOR OF FIXED EFFECTS PARAMETERS   *********
         TH 1      TH 2      TH 3      TH 4      TH 5
         1.67E+00  3.80E-01  7.59E-03  3.42E-04  2.01E+01

 OMEGA - COV MATRIX FOR RANDOM EFFECTS - ETAS  ********
         ETA1      ETA2      ETA3
 ETA1
+        9.67E-01
 ETA2
+        0.00E+00  1.05E+00
 ETA3
+        0.00E+00  0.00E+00  3.45E+00

 OMEGA - CORR MATRIX FOR RANDOM EFFECTS - ETAS  *******
         ETA1      ETA2      ETA3
 ETA1
+        9.83E-01
 ETA2
+        0.00E+00  1.03E+00
 ETA3
+        0.00E+00  0.00E+00  1.86E+00

 ********************         OBJECTIVE FUNCTION EVALUATION BY IMPORTANCE SAMPLING (NO PRIOR)        ********************
 ********************                         STANDARD ERROR OF ESTIMATE (RSR)                       ********************

 THETA - VECTOR OF FIXED EFFECTS PARAMETERS   *********
         TH 1      TH 2      TH 3      TH 4      TH 5
         4.22E-02  1.45E-01  3.22E-03  2.48E-04  2.23E+00

 OMEGA - COV MATRIX FOR RANDOM EFFECTS - ETAS  ********
         ETA1      ETA2      ETA3
 ETA1
+        1.45E-01
 ETA2
+        0.00E+00  5.14E-01
 ETA3
+        0.00E+00  0.00E+00  1.28E+00

 OMEGA - CORR MATRIX FOR RANDOM EFFECTS - ETAS  *******
         ETA1      ETA2      ETA3
 ETA1
+        7.35E-02
 ETA2
+       .........  2.51E-01
 ETA3
+       ......... .........  3.45E-01

 ********************         OBJECTIVE FUNCTION EVALUATION BY IMPORTANCE SAMPLING (NO PRIOR)        ********************
 ********************                       COVARIANCE MATRIX OF ESTIMATE (RSR)                      ********************

            TH 1      TH 2      TH 3      TH 4      TH 5      OM11      OM12      OM13      OM22      OM23      OM33
 TH 1
+        1.78E-03
 TH 2
+        2.01E-03  2.10E-02
 TH 3
+        1.71E-05 -8.20E-05  1.04E-05
 TH 4
+        2.26E-06  1.90E-06  6.86E-07  6.13E-08
 TH 5
+       -9.59E-03 -1.57E-02  1.76E-03  3.81E-06  4.99E+00
 OM11
+       -1.58E-03  7.57E-04  6.47E-06 -3.32E-06  4.64E-02  2.09E-02
 OM12
+       ......... ......... ......... ......... ......... ......... .........
 OM13
+       ......... ......... ......... ......... ......... ......... ......... .........
 OM22
+       -2.21E-03 -1.97E-03 -1.07E-03 -1.05E-04  1.19E-02  1.38E-02  0.00E+00  0.00E+00  2.65E-01
 OM23
+       ......... ......... ......... ......... ......... ......... ......... ......... ......... .........
 OM33
+       -1.16E-02  1.68E-02 -3.10E-03 -2.71E-04  1.88E-01  1.94E-02  0.00E+00  0.00E+00  4.55E-01  0.00E+00  1.64E+00

 ********************         OBJECTIVE FUNCTION EVALUATION BY IMPORTANCE SAMPLING (NO PRIOR)        ********************
 ********************                       CORRELATION MATRIX OF ESTIMATE (RSR)                     ********************

            TH 1      TH 2      TH 3      TH 4      TH 5      OM11      OM12      OM13      OM22      OM23      OM33
 TH 1
+        4.22E-02
 TH 2
+        3.28E-01  1.45E-01
 TH 3
+        1.26E-01 -1.75E-01  3.22E-03
 TH 4
+        2.16E-01  5.28E-02  8.59E-01  2.48E-04
 TH 5
+       -1.02E-01 -4.85E-02  2.44E-01  6.88E-03  2.23E+00
 OM11
+       -2.59E-01  3.61E-02  1.39E-02 -9.27E-02  1.44E-01  1.45E-01
 OM12
+       ......... ......... ......... ......... ......... ......... .........
 OM13
+       ......... ......... ......... ......... ......... ......... ......... .........
 OM22
+       -1.02E-01 -2.64E-02 -6.45E-01 -8.24E-01  1.04E-02  1.85E-01  0.00E+00  0.00E+00  5.14E-01
 OM23
+       ......... ......... ......... ......... ......... ......... ......... ......... ......... .........
 OM33
+       -2.14E-01  9.06E-02 -7.49E-01 -8.55E-01  6.58E-02  1.05E-01  0.00E+00  0.00E+00  6.90E-01  0.00E+00  1.28E+00
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
 ********************         OBJECTIVE FUNCTION EVALUATION BY IMPORTANCE SAMPLING (NO PRIOR)        ********************
 ********************                   EIGENVALUES OF COR MATRIX OF ESTIMATE (RSR)                  ********************

             1         2         3         4         5         6         7         8
         4.95E-02  1.92E-01  2.65E-01  6.32E-01  8.95E-01  1.10E+00  1.48E+00  3.39E+00
 Elapsed postprocess time in seconds:     0.05
 Elapsed finaloutput time in seconds:     0.04
 #CPUT: Total CPU Time in Seconds,      469.654
