Sun Oct 19 04:47:20 AM UTC 2025
;; 1. Based on: 2
$SIZES      LIM6=4000 LTH=-1000 DIMNEW=-10000
$PROBLEM
$INPUT      ID TIME DAY ITEM DV AGE MENOSN LESION1 ECOG CHEMO SURGERY
            RADIO ERS PGRS MHDEPRES MDANXIET WEIGHT PFS ITMGRPN
$DATA      Analysis_Data_nm_wCov.csv IGNORE=@
$PRED
;-------------------------constants to select model type-------------------------
PSI_MODEL=0
UNDEF=0
OC1=1    ; ordered categorical [1,4]

;-------------------------assignment of item parameters--------------------------
IF(ITEM.EQ.1) THEN
    MODEL=OC1
    DIS=THETA(1)
    DIF1=THETA(2)
    DIF2=THETA(3)
    DIF3=THETA(4)
ELSE IF(ITEM.EQ.2) THEN
    MODEL=OC1
    DIS=THETA(5)
    DIF1=THETA(6)
    DIF2=THETA(7)
    DIF3=THETA(8)
ELSE IF(ITEM.EQ.3) THEN
    MODEL=OC1
    DIS=THETA(9)
    DIF1=THETA(10)
    DIF2=THETA(11)
    DIF3=THETA(12)
ELSE IF(ITEM.EQ.4) THEN
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    MODEL=OC1
    DIS=THETA(101)
    DIF1=THETA(102)
    DIF2=THETA(103)
    DIF3=THETA(104)
ELSE IF(ITEM.EQ.27) THEN
    MODEL=OC1
    DIS=THETA(105)
    DIF1=THETA(106)
    DIF2=THETA(107)
    DIF3=THETA(108)
ELSE
    MODEL=UNDEF
    PPRED=0
    SDPRED=0
    P=0
    P0=0
    P1=0
    P2=0
    P3=0
    P4=0
    PGE1=0
    PGE2=0
    PGE3=0
    PGE4=0
END IF

;-------------------------The latent variable model------------------------------
BasePSI = THETA(109) + ETA(1)

BasePSIAGE = BasePSI * (1 + THETA(111)*(AGE-30))

TMSLP = THETA(110) + ETA(2)

PSI = BasePSIAGE + TMSLP*TIME

;-------------------------ordered categorical data model with 4 levels: [1,4]----
IF(MODEL.EQ.OC1) THEN
    DIFG1=DIF1
    DIFG2=DIFG1+DIF2
    DIFG3=DIFG2+DIF3

    PGE1=EXP(DIS*(PSI-DIFG1))/(1+EXP(DIS*(PSI-DIFG1)))
    PGE2=EXP(DIS*(PSI-DIFG2))/(1+EXP(DIS*(PSI-DIFG2)))
    PGE3=EXP(DIS*(PSI-DIFG3))/(1+EXP(DIS*(PSI-DIFG3)))

    P1=1-PGE1
    P2=PGE1-PGE2
    P3=PGE2-PGE3
    P4=PGE3

    PPRED=P1*1 + P2*2 + P3*3 + P4*4
    SDPRED=SQRT(P1*(1-PPRED)**2 + P2*(2-PPRED)**2 + P3*(3-PPRED)**2 + P4*(4-PPRED)**2)
ENDIF

IF(MODEL.EQ.OC1.AND.DV.LE.1) P=P1
IF(MODEL.EQ.OC1.AND.DV.EQ.2) P=P2
IF(MODEL.EQ.OC1.AND.DV.EQ.3) P=P3
IF(MODEL.EQ.OC1.AND.DV.GE.4) P=P4

;-------------------------Response probability prediction and residual-----------
IF(P.LT.1E-16) P=1E-16  ; To protect for P->0
IF(P.GT.(1-1E-16)) P=1-1E-16  ; To protect for P->1
Y=-2*LOG(P)
PWRES = (DV - PPRED) / SDPRED

IF (MODEL.EQ.UNDEF) THEN
    PWRES=0
    P=0
    Y=0
ENDIF

;-------------------------simulation code----------------------------------------
IF(ICALL.EQ.4) THEN
    IF(MODEL.EQ.OC1) THEN
        CALL RANDOM(2, R)
        SDV=1
        IF(R.LT.PGE1) SDV=2
        IF(R.LT.PGE2) SDV=3
        IF(R.LT.PGE3) SDV=4
    ENDIF

    DV=SDV
ENDIF

;-------------------------estimation task----------------------------------------
;Sim_start for VPC
$ESTIMATION METHOD=COND LAPLACE -2LL MAXEVAL=999999 PRINT=1
;$SIMULATION (2080178325) (1517856924 UNI) ONLYSIM NOPRED

;Sim_end for VPC
$TABLE      ID TIME DV ITEM PSI PPRED PWRES DIF1 DIF2 DIF3 DIS DIFG1
            DIFG2 DIFG3 VARCALC=1 FILE=irt_tab3 NOAPPEND ONEHEADER
            NOPRINT
$TABLE      ID TIME DV ITEM P0 P1 P2 P3 P4 FILE=prob_tab3 NOAPPEND
            ONEHEADER NOPRINT
;-------------------------random effects-----------------------------------------
$OMEGA  1  FIX  ; IIV Baseline PSI
$OMEGA  0.00505149  ;  IIV Slope
$THETA  1.9343 FIX ; I1DIS 1
 -0.9386 FIX ; I1DIF1 2
 1.543 FIX ; I1DIF2 3
 1.1282 FIX ; I1DIF3 4
 2.0591 FIX ; I2DIS 5
 -0.80436 FIX ; I2DIF1 6
 1.3819 FIX ; I2DIF2 7
 1.0301 FIX ; I2DIF3 8
 1.64 FIX ; I3DIS 9
 0.57483 FIX ; I3DIF1 10
 1.4147 FIX ; I3DIF2 11
 0.93171 FIX ; I3DIF3 12
 1.8011 FIX ; I4DIS 13
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 -0.084875 FIX ; I26DIF1 102
 1.5771 FIX ; I26DIF2 103
 1.1614 FIX ; I26DIF3 104
 1.9699 FIX ; I27DIS 105
 -0.24135 FIX ; I27DIF1 106
 1.2976 FIX ; I27DIF2 107
 0.96061 FIX ; I27DIF3 108
 0 FIX ; Baseline PSI
 0.01035 ; Slope Time (1/week)
 0.001 ; Prop effect age (1/unit)

NM-TRAN MESSAGES
 WARNINGS AND ERRORS (IF ANY) FOR PROBLEM    1
 (WARNING  2) NM-TRAN INFERS THAT THE DATA ARE POPULATION.
 (WARNING  13) WITH USER-WRITTEN PRED OR $PRED, NM-TRAN CANNOT APPEND THE
 MDV DATA ITEM.
 (WARNING  27) THE ABBREVIATED CODE CONTAINS A SIMULATION BLOCK BUT THERE IS
 NO $SIMULATION RECORD.

1NONLINEAR MIXED EFFECTS MODEL PROGRAM (NONMEM) VERSION 7.5.1
 ORIGINALLY DEVELOPED BY STUART BEAL, LEWIS SHEINER, AND ALISON BOECKMANN
 CURRENT DEVELOPERS ARE ROBERT BAUER, ICON DEVELOPMENT SOLUTIONS,
 AND ALISON BOECKMANN. IMPLEMENTATION, EFFICIENCY, AND STANDARDIZATION
 PERFORMED BY NOUS INFOSYSTEMS.
 PROBLEM NO.:         1

 TOT. NO. OF OBS RECS:    28107
 TOT. NO. OF INDIVIDUALS:      194
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 #TBLN:      1
 #METH: Laplacian Conditional Estimation
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
 #TERM:
0MINIMIZATION SUCCESSFUL
 NO. OF FUNCTION EVALUATIONS USED:       76
 NO. OF SIG. DIGITS IN FINAL EST.:  4.1

 ETABAR IS THE ARITHMETIC MEAN OF THE ETA-ESTIMATES,
 AND THE P-VALUE IS GIVEN FOR THE NULL HYPOTHESIS THAT THE TRUE MEAN IS 0.

 ETABAR:        -2.2060E-02  2.0546E-04
 SE:             6.8034E-02  4.5042E-03
 N:                     194         194

 P VAL.:         7.4575E-01  9.6362E-01

 ETASHRINKSD(%)  5.2399E+00  1.2144E+01
 ETASHRINKVR(%)  1.0205E+01  2.2814E+01
 EBVSHRINKSD(%)  2.5444E+00  1.1795E+01
 EBVSHRINKVR(%)  5.0240E+00  2.2199E+01
 RELATIVEINF(%)  9.4605E+01  7.7497E+01
 EPSSHRINKSD(%)  1.0000E+02
 EPSSHRINKVR(%)  1.0000E+02


 TOTAL DATA POINTS NORMALLY DISTRIBUTED (N):            0
 N*LOG(2PI) CONSTANT TO OBJECTIVE FUNCTION:    0.0000000000000000
 OBJECTIVE FUNCTION VALUE WITHOUT CONSTANT:    45293.885162717917
 OBJECTIVE FUNCTION VALUE WITH CONSTANT:       45293.885162717917
 REPORTED OBJECTIVE FUNCTION DOES NOT CONTAIN CONSTANT

 TOTAL EFFECTIVE ETAS (NIND*NETA):                           382


 #TERE:
 Elapsed estimation  time in seconds:     9.69
 Elapsed postprocess time in seconds:     4.94

 ********************                         LAPLACIAN CONDITIONAL ESTIMATION                       ********************
 #OBJT:**************                       MINIMUM VALUE OF OBJECTIVE FUNCTION                      ********************
 #OBJV:********************************************    45293.885       **************************************************

 ********************                         LAPLACIAN CONDITIONAL ESTIMATION                       ********************
 ********************                             FINAL PARAMETER ESTIMATE                           ********************

 THETA - VECTOR OF FIXED EFFECTS PARAMETERS   *********
         TH  1     TH  2     TH  3     TH  4     TH  5     TH  6     TH  7     TH  8     TH  9     TH 10     TH 11     TH 12
          TH 13     TH 14     TH 15     TH 16     TH 17     TH 18     TH 19     TH 20     TH 21     TH 22     TH 23     TH 24
         TH 25     TH 26     TH 27     TH 28     TH 29     TH 30     TH 31     TH 32     TH 33     TH 34     TH 35     TH 36
          TH 37     TH 38     TH 39     TH 40     TH 41     TH 42     TH 43     TH 44     TH 45     TH 46     TH 47     TH 48
         TH 49     TH 50     TH 51     TH 52     TH 53     TH 54     TH 55     TH 56     TH 57     TH 58     TH 59     TH 60
          TH 61     TH 62     TH 63     TH 64     TH 65     TH 66     TH 67     TH 68     TH 69     TH 70     TH 71     TH 72
         TH 73     TH 74     TH 75     TH 76     TH 77     TH 78     TH 79     TH 80     TH 81     TH 82     TH 83     TH 84
          TH 85     TH 86     TH 87     TH 88     TH 89     TH 90     TH 91     TH 92     TH 93     TH 94     TH 95     TH 96
         TH 97     TH 98     TH 99     TH100     TH101     TH102     TH103     TH104     TH105     TH106     TH107     TH108
          TH109     TH110     TH111
         1.93E+00 -9.39E-01  1.54E+00  1.13E+00  2.06E+00 -8.04E-01  1.38E+00  1.03E+00  1.64E+00  5.75E-01  1.41E+00  9.32E-01
          1.80E+00  4.37E-02  1.47E+00  1.05E+00  1.77E+00  1.68E+00  1.09E+00  8.43E-01  2.14E+00 -4.12E-01  1.47E+00  9.07E-01
         2.05E+00 -2.99E-01  1.31E+00  9.42E-01  1.33E+00  1.80E-01  1.67E+00  1.42E+00  1.32E+00 -4.51E-01  1.74E+00  1.12E+00
          2.18E+00 -1.00E+00  1.68E+00  1.12E+00  8.73E-01 -4.31E-01  2.38E+00  1.55E+00  2.10E+00 -4.45E-01  1.47E+00  9.81E-01
         1.34E+00  4.47E-01  1.21E+00  9.83E-01  9.62E-01  5.69E-01  2.20E+00  1.54E+00  1.11E+00  1.78E+00  1.50E+00  9.32E-01
          7.95E-01  1.21E+00  2.14E+00  1.63E+00  6.20E-01  9.38E-01  2.66E+00  2.78E+00  2.12E+00 -1.15E+00  1.85E+00  1.06E+00
         1.56E+00  8.36E-02  1.30E+00  1.03E+00  1.55E+00  5.54E-01  1.51E+00  1.06E+00  1.06E+00 -3.37E-01  2.34E+00  1.94E+00
          1.10E+00 -1.10E+00  2.35E+00  1.73E+00  1.07E+00 -8.43E-02  2.27E+00  1.72E+00  1.18E+00 -1.46E-01  1.91E+00  1.57E+00
         1.15E+00  1.02E-01  2.27E+00  1.38E+00  1.65E+00 -8.49E-02  1.58E+00  1.16E+00  1.97E+00 -2.41E-01  1.30E+00  9.61E-01
          0.00E+00  1.04E-02  3.71E-03

 OMEGA - COV MATRIX FOR RANDOM EFFECTS - ETAS  ********
         ETA1      ETA2
 ETA1
+        1.00E+00
 ETA2
+        0.00E+00  5.10E-03

 OMEGA - CORR MATRIX FOR RANDOM EFFECTS - ETAS  *******
         ETA1      ETA2
 ETA1
+        1.00E+00
 ETA2
+        0.00E+00  7.14E-02
 Elapsed finaloutput time in seconds:     1.45
 #CPUT: Total CPU Time in Seconds,       19.968
