;; 1. Based on: 2
$SIZES      LIM6=4000 LTH=-1000 DIMNEW=-10000
$PROBLEM
$INPUT      ID TIME DAY ITEM DV AGE MENOSN LESION1 ECOG CHEMO SURGERY RADIO ERS PGRS MHDEPRES MDANXIET WEIGHT PFS ITMGRPN
$DATA      ../data/Analysis_Data_nm_wCov.csv IGNORE=@
$PRED
;-------------------------constants to select model type-------------------------
PSI_MODEL=0
UNDEF=0
OC1=1    ; ordered categorical [1,4]

;-------------------------assignment of item parameters--------------------------
IF(ITEM.EQ.1) THEN
    MODEL=OC1
    DIS=THETA(1)
    DIF1=THETA(2)
    DIF2=THETA(3)
    DIF3=THETA(4)
ELSE IF(ITEM.EQ.2) THEN
    MODEL=OC1
    DIS=THETA(5)
    DIF1=THETA(6)
    DIF2=THETA(7)
    DIF3=THETA(8)
ELSE IF(ITEM.EQ.3) THEN
    MODEL=OC1
    DIS=THETA(9)
    DIF1=THETA(10)
    DIF2=THETA(11)
    DIF3=THETA(12)
ELSE IF(ITEM.EQ.4) THEN
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    MODEL=OC1
    DIS=THETA(101)
    DIF1=THETA(102)
    DIF2=THETA(103)
    DIF3=THETA(104)
ELSE IF(ITEM.EQ.27) THEN
    MODEL=OC1
    DIS=THETA(105)
    DIF1=THETA(106)
    DIF2=THETA(107)
    DIF3=THETA(108)
ELSE
    MODEL=UNDEF
    PPRED=0
    SDPRED=0
    P=0
    P0=0
    P1=0
    P2=0
    P3=0
    P4=0
    PGE1=0
    PGE2=0
    PGE3=0
    PGE4=0
END IF

;-------------------------The latent variable model------------------------------
BasePSI = THETA(109) + ETA(1)

BasePSIAGE = BasePSI * (1 + THETA(111)*(AGE-30))

TMSLP = THETA(110) + ETA(2)

PSI = BasePSIAGE + TMSLP*TIME

;-------------------------ordered categorical data model with 4 levels: [1,4]----
IF(MODEL.EQ.OC1) THEN
    DIFG1=DIF1
    DIFG2=DIFG1+DIF2
    DIFG3=DIFG2+DIF3

    PGE1=EXP(DIS*(PSI-DIFG1))/(1+EXP(DIS*(PSI-DIFG1)))
    PGE2=EXP(DIS*(PSI-DIFG2))/(1+EXP(DIS*(PSI-DIFG2)))
    PGE3=EXP(DIS*(PSI-DIFG3))/(1+EXP(DIS*(PSI-DIFG3)))

    P1=1-PGE1
    P2=PGE1-PGE2
    P3=PGE2-PGE3
    P4=PGE3

    PPRED=P1*1 + P2*2 + P3*3 + P4*4
    SDPRED=SQRT(P1*(1-PPRED)**2 + P2*(2-PPRED)**2 + P3*(3-PPRED)**2 + P4*(4-PPRED)**2)
ENDIF

IF(MODEL.EQ.OC1.AND.DV.LE.1) P=P1
IF(MODEL.EQ.OC1.AND.DV.EQ.2) P=P2
IF(MODEL.EQ.OC1.AND.DV.EQ.3) P=P3
IF(MODEL.EQ.OC1.AND.DV.GE.4) P=P4

;-------------------------Response probability prediction and residual-----------
IF(P.LT.1E-16) P=1E-16  ; To protect for P->0
IF(P.GT.(1-1E-16)) P=1-1E-16  ; To protect for P->1
Y=-2*LOG(P)
PWRES = (DV - PPRED) / SDPRED

IF (MODEL.EQ.UNDEF) THEN
    PWRES=0
    P=0
    Y=0
ENDIF

;-------------------------simulation code----------------------------------------
IF(ICALL.EQ.4) THEN
    IF(MODEL.EQ.OC1) THEN
        CALL RANDOM(2, R)
        SDV=1
        IF(R.LT.PGE1) SDV=2
        IF(R.LT.PGE2) SDV=3
        IF(R.LT.PGE3) SDV=4
    ENDIF

    DV=SDV
ENDIF

;-------------------------estimation task----------------------------------------
;Sim_start for VPC
$ESTIMATION METHOD=COND LAPLACE -2LL MAXEVAL=999999 PRINT=1
;$SIMULATION (2080178325) (1517856924 UNI) ONLYSIM NOPRED

;Sim_end for VPC
$TABLE      ID TIME DV ITEM PSI PPRED PWRES DIF1 DIF2 DIF3 DIS DIFG1
            DIFG2 DIFG3 VARCALC=1 FILE=irt_tab3 NOAPPEND ONEHEADER
            NOPRINT
$TABLE      ID TIME DV ITEM P0 P1 P2 P3 P4 FILE=prob_tab3 NOAPPEND
            ONEHEADER NOPRINT
;-------------------------random effects-----------------------------------------
$OMEGA  1  FIX  ; IIV Baseline PSI
$OMEGA  0.00505149  ;  IIV Slope
$THETA  1.9343 FIX ; I1DIS 1
 -0.9386 FIX ; I1DIF1 2
 1.543 FIX ; I1DIF2 3
 1.1282 FIX ; I1DIF3 4
 2.0591 FIX ; I2DIS 5
 -0.80436 FIX ; I2DIF1 6
 1.3819 FIX ; I2DIF2 7
 1.0301 FIX ; I2DIF3 8
 1.64 FIX ; I3DIS 9
 0.57483 FIX ; I3DIF1 10
 1.4147 FIX ; I3DIF2 11
 0.93171 FIX ; I3DIF3 12
 1.8011 FIX ; I4DIS 13
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 -0.084875 FIX ; I26DIF1 102
 1.5771 FIX ; I26DIF2 103
 1.1614 FIX ; I26DIF3 104
 1.9699 FIX ; I27DIS 105
 -0.24135 FIX ; I27DIF1 106
 1.2976 FIX ; I27DIF2 107
 0.96061 FIX ; I27DIF3 108
 0 FIX   ; Baseline PSI
 0.01035 ; Slope Time (1/week)
 0.001   ; Prop effect age (1/unit)
